f(x) := sin(4*x)
t := 0, 0.125 .. 6
# [plot: f(t) vs t]
b := 1
a := π/4
N := 200
i := 1 .. N
x[i] := rnd(a)
y[i] := rnd(b)
m[i] := if(y[i] < f(x[i]), 1, 0)
M := sum(m[i], i)
M = 127
S := M*a*b/N
S = 0.498728
