trap(a, b, n, f) :=
    h ← (b - a)/n
    S ← 0
    for j ∈ 1 .. (n - 1)
        x[j] ← a + h*j
        S ← S + f(x[j])
    S ← (S + (f(a) + f(b))/2)*h
    S
f(x) := sin(4*x)
trap(0, π/4, 1000, f) = 0.5
