f(x) := 2*x^3 + x^2 - 4
dihot(a, b, e) :=
    k ← 0
    while 1
        c ← (a + b)/2
        if f(c)*f(a) < 0
            b ← c
        a ← c
        k ← k + 1
        if |a - b| < e
            break
    [c; k]
horda(a, b, e) :=
    k ← 0
    while 1
        c ← a - f(a)*(b - a)/(f(b) - f(a))
        if f(c)*f(a) < 0
            b ← c
        a ← c
        k ← k + 1
        if |f(c)| < e
            break
    [c; k]
dihot(3, 4, 0.001) = [3.99902; 10]
horda(3, 4, 0.001) = [1.11347; 41]
